// COMSOL Multiphysics 6.0.0.318 model "Untitled.mph"
// Outline of the model tree

Geometry
  geom1 "几何 1" (2D, length unit m)
    sq1: Square "正方形 1"
    fin: Finalize "形成联合体"

Materials
  mat1: Common "Aluminum" on all domains
    def "Basic"
      relpermeability = 1
      heatcapacity = 900[J/(kg*K)]
      thermalconductivity = 238[W/(m*K)]
      electricconductivity = 3.774e7[S/m]
      relpermittivity = 1
      thermalexpansioncoefficient = 23e-6[1/K]
      density = 2700[kg/m^3]
    Enu "Young's modulus and Poisson's ratio"
      E = 70e9[Pa]
      nu = 0.33
    Murnaghan
      l = -2.5e11[Pa]
      m = -3.3e11[Pa]
      n = -3.5e11[Pa]
    Lame "Lamé parameters"
      lambLame = 5.1e10[Pa]
      muLame = 2.6e10[Pa]

Physics
  elte: ElasticWavesTimeExplicit "弹性波，时域显式" on all domains
    dependent variable v = {vx, vy, vz}
    eltem1: ElasticWavesTimeExplicitModel "弹性波，时域显式模型 1" (default)
    free1: Free "自由 1" (default)
    init1: init "初始值 1" (default)

Mesh
  mesh1 "网格 1"
    size: MeshSizeDefault "大小" | custom = on
    map1: Map "映射 1" on remaining entities
      dis1: Distribution "分布 1" on boundaries 1, 2 | numelem = 2

Studies
  std1 "研究 1"
    time: Transient "瞬态" | tlist = range(0,0.1,1)

Solver configurations
  sol1 "解 1" (study std1)
    v1: Variables "因变量 1"
    tx1: TimeExplicit "时域显式求解器 1" | tlist = range(0,0.1,1); tstepping = elemexprs; exprs = root.comp1.elte.wtc
      dDef: Direct "直接"
      fc1: FullyCoupled "全耦合 1" | linsolver = dDef
    a1: Assemble "组装 1" | K = on; E = on

Datasets
  dset1: Solution | solution = sol1

Derived values
  sys1: SystemMatrix "系统矩阵 1" | table = tbl1; solution = sol1
  sys2: SystemMatrix "系统矩阵 2" | solution = sol1; matrixassem = mass