// COMSOL Multiphysics 6.0.0.318 model "Untitled1.mph"
// Outline of the model tree

Common definitions
  mpf1: ParticipationFactors "参与因子 1"

Geometry
  geom1 "几何 1" (2D, length unit m)
    sq1: Square "正方形 1"
    fin: Finalize "形成联合体"

Materials
  mat1: Common "Aluminum" on all domains
    def "Basic"
      relpermeability = 1
      heatcapacity = 900[J/(kg*K)]
      thermalconductivity = 238[W/(m*K)]
      electricconductivity = 3.774e7[S/m]
      relpermittivity = 1
      thermalexpansioncoefficient = 23e-6[1/K]
      density = 2700[kg/m^3]
    Enu "Young's modulus and Poisson's ratio"
      E = 70e9[Pa]
      nu = 0.33
    Murnaghan
      l = -2.5e11[Pa]
      m = -3.3e11[Pa]
      n = -3.5e11[Pa]
    Lame "Lamé parameters"
      lambLame = 5.1e10[Pa]
      muLame = 2.6e10[Pa]

Physics
  solid: SolidMechanics "固体力学" on all domains
    dependent variable u = {u, v, w}
    lemm1: LinearElasticModel "线弹性材料 1" (default)
    free1: Free "自由 1" (default)
    init1: init "初始值 1" (default)

Mesh
  mesh1 "网格 1"
    size: MeshSizeDefault "大小" | hmax = 0.067; hmin = 3.0E-4; hcurve = 0.3; hgrad = 1.3
    map1: Map "映射 1" on remaining entities
      dis1: Distribution "分布 1" on boundaries 1, 2 | numelem = 1

Studies
  std1 "研究 1"
    eig: Eigenfrequency "特征频率" | shift = 1[Hz]; conrad = 1

Solver configurations
  sol1 "解 1" (study std1)
    v1: Variables "因变量 1"
    e1: Eigenvalue "特征值求解器 1" | eigvfunscale = maximum; eigvfunscaleparam = 1.41e-06
      dDef: Direct "直接"
    a1: Assemble "组装 1" | K = on; E = on

Datasets
  dset1: Solution | solution = sol1

Derived values
  sys1: SystemMatrix "系统矩阵 1" | table = tbl1; solution = sol1
  sys2: SystemMatrix "系统矩阵 2" | table = tbl2; solution = sol1; matrixassem = mass

Evaluation groups
  std1EvgFrq: EvaluationGroup "特征频率 (研究 1)" | data = dset1
    gev1: EvalGlobal "全局计算 1"
      expr = {freq*2*pi, imag(freq)/abs(freq), abs(freq)/imag(freq)/2}
      unit = {rad/s, 1, 1}
      descr = {角频率, 阻尼比, 品质因子}
  std1mpf1: EvaluationGroup "参与因子 (研究 1)" | data = dset1
    gev1: EvalGlobal "全局计算 1"
      expr = {mpf1.pfLnormX, mpf1.pfLnormY, mpf1.pfLnormZ, mpf1.pfRnormX, mpf1.pfRnormY, mpf1.pfRnormZ, mpf1.mEffLX, mpf1.mEffLY, mpf1.mEffLZ, mpf1.mEffRX, mpf1.mEffRY, mpf1.mEffRZ}
      unit = {1, 1, 1, 1, 1, 1, kg, kg, kg, kg*m^2, kg*m^2, kg*m^2}
      descr = {参与因子，归一化，X 平移, 参与因子，归一化，Y 平移, 参与因子，归一化，Z 平移, 参与因子，归一化，X 旋转, 参与因子，归一化，Y 旋转, 参与因子，归一化，Z 旋转, 有效模态质量，X 平移, 有效模态质量，Y 平移, 有效模态质量，Z 平移, 有效模态质量，X 旋转, 有效模态质量，Y 旋转, 有效模态质量，Z 旋转}

Plots
  pg1: PlotGroup2D "振型 (solid)" | data = dset1
    surf1: Surface "表面 1" | expr = solid.disp
      def: Deform "变形" | expr = {u, v}; descr = 位移场