// COMSOL Multiphysics 6.0.0.318 model "pin_yu_fen_xi.mph"
// Outline of the model tree

Parameters
  wave_length = 2*pi/k
  L = 15e-3
  W = 1e-3
  A1 = 0.071610385512135 - 0.351117170513489i
  A2 = -0.071610385512134 + 0.351117170513489i
  A3 = -0.597285074745805 - 0.121816356632858i
  A4 = -0.597285074745805 - 0.121816356632858i
  k = 2.711793115451204e+03
  p = 0.000000000000000e+00 + 2.513752326686830e+03i
  q = 0.000000000000000e+00 + 1.803923521899900e+03i
  ul1 = A1*i*(k)
  ul2 = A2*i*(k)
  ul3 = A3*i*(-q)
  ul4 = A4*i*(q)
  vl1 = A1*1i*p
  vl2 = A2*1i*(-p)
  vl3 = A3*1i*k
  vl4 = A4*1i*k
  har = exp(1i*k*L)

Geometry
  geom1 "几何 1" (2D, length unit m)
    r1: Rectangle "矩形 1" | pos = {L/2, 0}; base = center; size = {L, W}
    fin: Finalize "形成联合体"

Materials
  mat1: Common "Aluminum" on all domains
    def "Basic"
      relpermeability = 1
      heatcapacity = 900[J/(kg*K)]
      thermalconductivity = 238[W/(m*K)]
      electricconductivity = 3.774e7[S/m]
      relpermittivity = 1
      thermalexpansioncoefficient = 23e-6[1/K]
      density = 2700[kg/m^3]
    Enu "Young's modulus and Poisson's ratio"
      E = 70e9[Pa]
      nu = 0.33
    Murnaghan
      l = -2.5e11[Pa]
      m = -3.3e11[Pa]
      n = -3.5e11[Pa]
    Lame "Lamé parameters"
      lambLame = 5.1e10[Pa]
      muLame = 2.6e10[Pa]

Physics
  solid: SolidMechanics "固体力学" on all domains
    dependent variable u = {u, v, w}
    lemm1: LinearElasticModel "线弹性材料 1" (default)
    free1: Free "自由 1" (default)
    init1: init "初始值 1" (default)
    disp1: Displacement1 "指定位移 1" on boundaries 1
      Notation = StandardNotation
      Direction = {1, 1, 0}
      U0 = {ul1*exp(1i*p*y)+ul2*exp(-1i*p*y)+ul3*exp(1i*q*y)+ul4*exp(-1i*q*y), vl1*exp(1i*p*y)+vl2*exp(-1i*p*y)+vl3*exp(1i*q*y)+vl4*exp(-1i*q*y), 0}
      coordinateSystem = GlobalSystem
    disp2: Displacement1 "指定位移 2" on boundaries 4
      Notation = StandardNotation
      Direction = {1, 1, 0}
      U0 = {(ul1*exp(1i*p*y)+ul2*exp(-1i*p*y)+ul3*exp(1i*q*y)+ul4*exp(-1i*q*y))*har, (vl1*exp(1i*p*y)+vl2*exp(-1i*p*y)+vl3*exp(1i*q*y)+vl4*exp(-1i*q*y))*har, 0}
      coordinateSystem = GlobalSystem

Mesh
  mesh1 "网格 1"
    size: MeshSizeDefault "大小" | hauto = 1
    map1: Map "映射 1" on remaining entities
      dis1: Distribution "分布 1" on boundaries 2 | numelem = 100
      dis2: Distribution "分布 2" on boundaries 4 | numelem = 10

Studies
  std1 "研究 1"
    freq: Frequency "频域" | plist = 1e6

Solver configurations
  sol1 "解 1" (study std1)
    v1: Variables "因变量 1"
    s1: Stationary "稳态求解器 1"
      dDef: Direct "直接"
      p1: Parametric "参数化 1" | pname = freq; plistarr = 1e6; punit = Hz; pcontinuationmode = no
      fc1: FullyCoupled "全耦合 1" | linsolver = dDef

Datasets
  dset1: Solution | solution = sol1
  edg1: Edge2D "底边" on boundaries 2 | data = dset1
  edg2: Edge2D "左边界" on boundaries 1 | data = dset1
  edg3: Edge2D "右边界" on boundaries 4 | data = dset1

Plots
  pg1: PlotGroup2D "应力 (solid)" (disabled) | data = dset1
    surf1: Surface "表面 1" | expr = solid.mises_peak
      def: Deform "变形" | expr = {u, v}; descr = 位移场
  pg10: PlotGroup1D "左边界位移u" | data = edg2; datasetintitle = on; suffixintitle = 位移u; switchxy = on
    lngr1: LineGraph "实部" on boundaries 3 | expr = real(u); descr = 实部; autosolution = off
    lngr2: LineGraph "虚部" on boundaries 3 | expr = imag(u); descr = 虚部; autosolution = off
  pg11: PlotGroup1D "左边界位移v" | data = edg2; datasetintitle = on; suffixintitle = 位移v; switchxy = on
    lngr1: LineGraph "实部" on boundaries 3 | expr = real(v); descr = 实部; autosolution = off
    lngr2: LineGraph "虚部" on boundaries 3 | expr = imag(v); descr = 虚部; autosolution = off
  pg2: PlotGroup1D "右边界位移u" | data = edg3; datasetintitle = on; suffixintitle = 位移u; switchxy = on
    lngr1: LineGraph "实部" on boundaries 3 | expr = real(u); descr = 实部; autosolution = off
    lngr2: LineGraph "虚部" on boundaries 3 | expr = imag(u); descr = 虚部; autosolution = off
  pg6: PlotGroup1D "右边界位移v" | data = edg3; datasetintitle = on; suffixintitle = 位移v; switchxy = on
    lngr1: LineGraph "实部" on boundaries 3 | expr = real(v); descr = 实部; autosolution = off
    lngr2: LineGraph "虚部" on boundaries 3 | expr = imag(v); descr = 虚部; autosolution = off
  pg8: PlotGroup1D "底面位移u 1" | data = edg1; datasetintitle = on; suffixintitle = 位移u
    lngr1: LineGraph "实部" on boundaries 3 | expr = -real(u); descr = 实部; autosolution = off
    lngr2: LineGraph "虚部" on boundaries 3 | expr = imag(u); descr = 虚部; autosolution = off
  pg9: PlotGroup1D "底面位移v 1" | data = edg1; datasetintitle = on; suffixintitle = 位移v
    lngr1: LineGraph "实部" on boundaries 3 | expr = real(v); descr = 实部; autosolution = off
    lngr2: LineGraph "虚部" on boundaries 3 | expr = imag(v); descr = 虚部; autosolution = off
  pg4: PlotGroup2D "位移u" | data = dset1
    surf1: Surface "表面 1" | expr = u
      def: Deform "变形" | expr = {u, v}; descr = 位移场
  pg5: PlotGroup2D "位移v" | data = dset1
    surf1: Surface "表面 1" | expr = v
      def: Deform "变形" | expr = {u, v}; descr = 位移场
  pg7: PlotGroup1D "波结构" | data = edg3; datasetintitle = on; suffixintitle = 波结构; switchxy = on
    lngr1: LineGraph "u" on boundaries 3 | expr = real(u); descr = u; autosolution = off
    lngr2: LineGraph "v" on boundaries 3 | expr = real(v); descr = v; autosolution = off